// COMSOL Multiphysics 6.0.0.354 model "tube_tortion.mph"
// Outline of the model tree

Geometry
  geom1 "Geometry 1" (3D, length unit m)
    cyl1: Cylinder | r = 0.2; h = 10
    cyl2: Cylinder | r = 0.18; h = 10
    dif1: Difference | input = cyl1; input2 = cyl2
    fin: Finalize "Form Union"

Materials
  mat1: Common "Structural steel" on all domains
    def "Basic"
      relpermeability = 1
      heatcapacity = 475[J/(kg*K)]
      thermalconductivity = 44.5[W/(m*K)]
      electricconductivity = 4.032e6[S/m]
      relpermittivity = 1
      thermalexpansioncoefficient = 12.3e-6[1/K]
      density = 7850[kg/m^3]
    Enu "Young's modulus and Poisson's ratio"
      E = 200e9[Pa]
      nu = 0.30
    Murnaghan
      l = -3.0e11[Pa]
      m = -6.2e11[Pa]
      n = -7.2e11[Pa]
    Lame "Lamé parameters"
      lambLame = 1.15e11[Pa]
      muLame = 7.69e10[Pa]

Physics
  solid: SolidMechanics on all domains
    dependent variable u = {u, v, w}
    lemm1: LinearElasticModel "Linear Elastic Material 1" (default)
    free1: Free (default)
    init1: init "Initial Values 1" (default)
    fix1: Fixed "Fixed Constraint 1" on boundaries 4
    bndl1: BoundaryLoad on boundaries 3 | LoadType = TotalForce; FperArea = {0, 10, 0}; coordinateSystem = sys1

Mesh
  mesh1 "Mesh 1" (physics-controlled)

Studies
  std1 "Study 1"
    stat: Stationary